# Udregninger til Step down converter
# N er vindinger på spolen - V.out er sat til 5V - V.f er spændingsfald over diode -
N := 6
V_out := 5 V
V_F := 0.3 V
N*(V_out + V_F)/(100*10^-6*A) = 318000 Ω
V_pin := 1.239 V
# Udregninger til cut off frekvenser
R_6 := 1 MΩ
500 Hz == 1/(2*π*100*nF*R) solve, R → 1/(100000*π*Hz*nF) = 3183.1 Ω
I_pin := 2.5 μA
# Vælges til 3.3 kΩ, grundedt e24 række og derved fremkommer
V_in := 48 V
1/(2*π*100*nF*3.3*kΩ) = 482.288 1/s
R_7 == V_pin*R_6/((I_pin*R_6) + V_pin + V_in) solve → 1239.0*V*MΩ/(49239.0*V + 2500.0*μA*MΩ) = 23.9471 kΩ
