# Base resistor
# Beregningerne der foretages er worst case
# 90 mA kommer fra den maksimale strøm der kan løbe i højttalerne
I_c := 120 mA
h_fe := 40
# Derved kan strømmen der løber ind på base benet beregnes
I_b := I_c/h_fe
I_b = 3 mA
# Idet spændingsværdien fra MCU kendes kan størrelsen på modstanden beregnes
V_be := 5 V
V_be_sat := 850 mV
(V_be - V_be_sat)/I_b = 1383.33 Ω
# Der vælges derfor en modstand med værdien 2.77 kΩ
# Beregning af spændingsdeler
5 V == x/(10 kΩ + x)*48*V solve → 50*kΩ/43 = 1162.79 Ω
# Vælges til 1.1kΩ for at overholde E24 rækken. Der rundes ned for at holde inde for grænsen af 5 V
1.1 kΩ/(10 kΩ + 1.1 kΩ)*48*V = 4.75676 V
# Beregning af shunt resistor
16.8 Ω*m*10^-9*15*cm/(0.7 mm^2) = 0.0036 Ω
